<?xml version="1.0"?>

<!--
**************************************************************************

Copyright (c) 2026 Simon 'bomber' Morley
simonbomber64 at googlemail.com

**************************************************************************
-->

<propeller name="internal turbines for Pratt_Whitney-T73" version="1.01">

	<!--
	<ixx> is the rotational moment of inertia for the turbine.
	Small numbers accelerate faster but bounce around more. Large numbers
	accelerate slower and regulate smoother.

	-->

	<ixx unit="SLUG*FT2">1.3773</ixx>

	<!--
	Turbine Characteristics
	-->

	<diameter unit="IN">23</diameter>						<!-- set to ensure a tip mac of <0.85 at 110% rpm -->
	<numblades>2</numblades>
	<minpitch>0.186</minpitch>
	<maxpitch>90</maxpitch>
	<minrpm>0</minrpm>
	<maxrpm>10000</maxrpm>
	<ct_factor>0.0</ct_factor>
	<cp_factor>1.0</cp_factor>

	<table name="C_THRUST" type="internal">
		<tableData>
			0	0
			1	0
		</tableData>
	</table>

	<table name="C_POWER" type = "internal">
		<tableData>
				 0		10		90
			0	0.1		1.0		9.0
			1	0.1		1.0		9.0
		</tableData>
	</table>

</propeller>
