<?xml version="1.0"?>

<!--
**************************************************************************

Copyright (c) 2026 Simon 'bomber' Morley
simonbomber64 at googlemail.com

**************************************************************************
-->

<?xml-stylesheet type="text/xsl" href="http://jsbsim.sourceforge.net/JSBSim.xsl"?>
<fdm_config name="Sikorsky S-64e 'Skycrane' (JSBSim)" version="2.0" release="BETA"
xmlns:xsi="http://www.w3.org/2001/XMLSchema-instance"
xsi:noNamespaceSchemaLocation="http://jsbsim.sourceforge.net/JSBSim.xsd">

<fileheader>
<author>Simon 'bomber' Morley</author>
<filecreationdate> 2026-04-21 </filecreationdate>
<version> $Revision: 1.0 $ </version>
<description>Sikorsky S-64e</description>
</fileheader>

	<metrics>

		<wingspan unit="FT">71.9999999999999</wingspan>
		<wingarea unit="FT2">144.094488188976</wingarea>
		<cord unit="FT">2.001312335958</cord>				<!-- @ 50% ft-->

		<htailarea unit="FT2">22.4965727709233</htailarea>
		<htailarm unit="FT">68.8976377952755</htailarm>

		<vtailarea unit="FT2">16.0565251686059</vtailarea>
		<vtailarm unit="FT">67.3884514435695</vtailarm>

		<location name="AERORP" unit="IN">
			<x>333</x>
			<y>0</y>
			<z>256</z>
		</location>

	</metrics>

	<mass_balance>

		<!-- inertia values to rotor co-ords -->
		<ixx unit="SLUG*FT2">21949.3448227057</ixx>
		<iyy unit="SLUG*FT2">108713.026785167</iyy>
		<izz unit="SLUG*FT2">87494.3383127195</izz>
		<ixy unit="SLUG*FT2">-68.2268702684095</ixy>
		<iyz unit="SLUG*FT2">-36.1941253296374</iyz>
		<ixz unit="SLUG*FT2">-3547.80096331286</ixz>												<!-- IMPORTANT always use a negative value -->
		<emptywt unit="LBS">23032.5535900449</emptywt>
		<location name="CG" unit="IN">
			<x>333.644319879499</x>
			<y>0.0000435019889879508</y>
			<z>194.965768614171</z>
		</location>

		<pointmass name="Left Pilot">
			<weight unit="LBS">0</weight>
			<location name="POINTMASS" unit="FT">
				<x>7.70997375328083</x>
				<y>1.96850393700787</y>
				<z>12.0406824146982</z>
			</location>
		</pointmass>

		<pointmass name="Right Pilot">
			<weight unit="LBS">0</weight>
			<location name="POINTMASS" unit="FT">
				<x>7.70997375328083</x>
				<y>-1.96850393700787</y>
				<z>12.0406824146982</z>
			</location>
		</pointmass>

		<pointmass name="Engineer">
			<weight unit="LBS">0</weight>
			<location name="POINTMASS" unit="IN">
				<x>9.64566929133857</x>
				<y>-1.96850393700787</y>
				<z>9.61286089238844</z>
			</location>
		</pointmass>

		<pointmass name="Load Point">
			<weight unit="LBS">0</weight>
			<location name="POINTMASS" unit="IN">
				<x>333</x>
				<y>  0</y>
				<z>100</z>
			</location>
		</pointmass>

	</mass_balance>

	<ground_reactions>

		<contact type="BOGEY" name="nose_gear">
			<location unit="FT">
				<x>8.33333333333333</x>
				<y>0</y>
				<z>3.3375</z>
			</location>
			<static_friction>0.7</static_friction>
			<dynamic_friction>0.05</dynamic_friction>
			<rolling_friction>1</rolling_friction>
			<spring_coeff unit="LBS/FT">12000</spring_coeff>
			<damping_coeff unit="LBS/FT/SEC">12000</damping_coeff>
			<damping_coeff_rebound unit="LBS/FT/SEC">2000</damping_coeff_rebound>
			<retractable>0</retractable>
		</contact>

		<contact type="BOGEY" name="left_main_gear">
			<location unit="FT">
				<x>32.75</x>
				<y>-9.84251968503936</y>
				<z>3.09</z>
			</location>
			<static_friction>0.7</static_friction>
			<dynamic_friction>0.05</dynamic_friction>
			<rolling_friction>1</rolling_friction>
			<spring_coeff unit="LBS/FT">15000</spring_coeff>
			<damping_coeff unit="LBS/FT/SEC">15000</damping_coeff>
			<damping_coeff_rebound unit="LBS/FT/SEC">1000</damping_coeff_rebound>
			<retractable>0</retractable>
		</contact>

		<contact type="BOGEY" name="right_main_gear">
			<location unit="FT">
				<x>32.75</x>
				<y>9.84251968503936</y>
				<z>3.09</z>
			</location>
			<static_friction>0.7</static_friction>
			<dynamic_friction>0.05</dynamic_friction>
			<rolling_friction>1</rolling_friction>
			<spring_coeff unit="LBS/FT">15000</spring_coeff>
			<damping_coeff unit="LBS/FT/SEC">15000</damping_coeff>
			<damping_coeff_rebound unit="LBS/FT/SEC">1000</damping_coeff_rebound>
			<retractable>0</retractable>
		</contact>

	<!-- JACKS -->

<!-- 		<contact type="BOGEY" name="nose_jack">
			<location unit="FT">
				<x>8.33333333333333</x>
				<y>0</y>
				<z>3.333333</z>
			</location>
			<static_friction>0.7</static_friction>
			<dynamic_friction>0.05</dynamic_friction>
			<rolling_friction>1</rolling_friction>
			<spring_coeff unit="LBS/FT">1000000</spring_coeff>
			<damping_coeff unit="LBS/FT/SEC">10000</damping_coeff>
			<damping_coeff_rebound unit="LBS/FT/SEC">10000</damping_coeff_rebound>
			<retractable>0</retractable>
		</contact>

		<contact type="BOGEY" name="left_jack">
			<location unit="FT">
				<x>32.75</x>
				<y>-9.84251968503936</y>
				<z>3.083333</z>
			</location>
			<static_friction>0.7</static_friction>
			<dynamic_friction>0.05</dynamic_friction>
			<rolling_friction>1</rolling_friction>
			<spring_coeff unit="LBS/FT">1300000</spring_coeff>
			<damping_coeff unit="LBS/FT/SEC">10000</damping_coeff>
			<damping_coeff_rebound unit="LBS/FT/SEC">10000</damping_coeff_rebound>
			<retractable>0</retractable>
		</contact>

		<contact type="BOGEY" name="right_jack">
			<location unit="FT">
				<x>32.75</x>
				<y>9.84251968503936</y>
				<z>3.083333</z>
			</location>
			<static_friction>0.7</static_friction>
			<dynamic_friction>0.05</dynamic_friction>
			<rolling_friction>1</rolling_friction>
			<spring_coeff unit="LBS/FT">1300000</spring_coeff>
			<damping_coeff unit="LBS/FT/SEC">10000</damping_coeff>
			<damping_coeff_rebound unit="LBS/FT/SEC">10000</damping_coeff_rebound>
			<retractable>0</retractable>
		</contact> -->

	<!-- STRUCTURES -->

<!-- 		<contact type="STRUCTURE" name="NOSE">
			<location unit="FT">
				<x>3.5761154855643</x>
				<y>0</y>
				<z>7.34908136482939</z>
			</location>
			<static_friction>100</static_friction>
			<dynamic_friction>100</dynamic_friction>
			<spring_coeff unit="LBS/FT">136000</spring_coeff>
			<damping_coeff unit="LBS/FT/SEC">4080</damping_coeff>
			<damping_coeff_rebound unit="LBS/FT/SEC">8160</damping_coeff_rebound>
		</contact>

		<contact type="STRUCTURE" name="CANOPY_LEFT">
			<location unit="FT">
				<x>6.92257217847768</x>
				<y>0</y>
				<z>14.6653543307086</z>
			</location>
			<static_friction>100</static_friction>
			<dynamic_friction>100</dynamic_friction>
			<spring_coeff unit="LBS/FT">136000</spring_coeff>
			<damping_coeff unit="LBS/FT/SEC">4080</damping_coeff>
			<damping_coeff_rebound unit="LBS/FT/SEC">8160</damping_coeff_rebound>
		</contact>

		<contact type="STRUCTURE" name="CANOPY_RIGHT">
			<location unit="FT">
				<x>6.92257217847768</x>
				<y>0</y>
				<z>14.6653543307086</z>
			</location>
			<static_friction>100</static_friction>
			<dynamic_friction>100</dynamic_friction>
			<spring_coeff unit="LBS/FT">136000</spring_coeff>
			<damping_coeff unit="LBS/FT/SEC">4080</damping_coeff>
			<damping_coeff_rebound unit="LBS/FT/SEC">8160</damping_coeff_rebound>
		</contact>

		<contact type="STRUCTURE" name="TAILSKID">
			<location unit="FT">
				<x>68.4383202099737</x>
				<y>0</y>
				<z>10.4002624671916</z>
			</location>
			<static_friction>100</static_friction>
			<dynamic_friction>100</dynamic_friction>
			<spring_coeff unit="LBS/FT">136000</spring_coeff>
			<damping_coeff unit="LBS/FT/SEC">4080</damping_coeff>
			<damping_coeff_rebound unit="LBS/FT/SEC">8160</damping_coeff_rebound>
		</contact>

		<contact type="STRUCTURE" name="VSTAB">
			<location unit="FT">
				<x>72.1784776902887</x>
				<y>0</y>
				<z>20.505249343832</z>
			</location>
			<static_friction>100</static_friction>
			<dynamic_friction>100</dynamic_friction>
			<spring_coeff unit="LBS/FT">136000</spring_coeff>
			<damping_coeff unit="LBS/FT/SEC">4080</damping_coeff>
			<damping_coeff_rebound unit="LBS/FT/SEC">8160</damping_coeff_rebound>
		</contact> -->

	</ground_reactions>

	<propulsion>

		<engine file="dummy_motor">				<!-- reserved for the APP -->
			<location unit="FT">
				<x>72.4324999999999</x>
				<z>21.3083333333333</z>
			</location>
			<thruster file="dummy_prop">
				<location unit="FT">
					<x>72.4324999999999</x>
					<z>21.3083333333333</z>
				</location>
				<orient unit="DEG">
					<yaw>90</yaw>
				</orient>
				<sense>1</sense>
				<p_factor>0</p_factor>
			</thruster>
		</engine>

		<engine file="Main-gearbox">
			<location unit="FT">
				<x>27.755905511811</x>
				<z>17.6181102362205</z>
			</location>
			<orient unit="DEG">
				<pitch>90</pitch>
			</orient>
			<thruster file="Rotor_main">
				<location unit="FT">
					<x>27.7416666666666</x>
					<z>21.3083333333333</z>
				</location>
				<orient unit="DEG">
					<pitch>90</pitch>
				</orient>
				<sense>1</sense>
				<p_factor>0</p_factor>
			</thruster>
		</engine>

		<engine file="dummy_motor">
			<location unit="FT">
				<x>72.4324999999999</x>
				<z>21.3083333333333</z>
			</location>
			<thruster file="dummy_prop">
				<location unit="FT">
					<x>72.4324999999999</x>
					<z>21.3083333333333</z>
				</location>
				<orient unit="DEG">
					<yaw>90</yaw>
				</orient>
				<sense>1</sense>
				<p_factor>0</p_factor>
			</thruster>
		</engine>

	<!-- #### Tubines #### -->

		<engine file="Pratt_Whitney-T73">
			<location unit="FT">
				<x>21.5223097112861</x>
				<y>-2.03412073490813</y>
				<z>17.6181102362205</z>
			</location>
			<feed>1</feed>
			<feed>5</feed>
			<thruster file="Pratt_Whitney-T73_load">
				<location unit="FT">
					<x>27.7416666666666</x>
					<z>17.6181102362205</z>
				</location>
				<orient unit="DEG">
					<yaw>90</yaw>
				</orient>
				<sense>1</sense>
			</thruster>
		</engine>

		<engine file="Pratt_Whitney-T73">
			<location unit="FT">
				<x>21.5223097112861</x>
				<y>2.03412073490813</y>
				<z>17.6181102362205</z>
			</location>
			<feed>2</feed>
			<feed>5</feed>
			<thruster file="Pratt_Whitney-T73_load">
				<location unit="FT">
					<x>27.7416666666666</x>
					<z>17.6181102362205</z>
				</location>
				<orient unit="DEG">
					<yaw>90</yaw>
				</orient>
				<sense>-1</sense>
			</thruster>
		</engine>

		<tank type="FUEL" number="0">									<!-- Used so as tanks start at 1 -->
			<location unit="FT">
			</location>
			<capacity unit="LBS">0</capacity>
			<contents unit="LBS">0</contents>
		</tank>

		<!-- Control Tanks for Cross-feed -->

		<tank type="FUEL" number="1">
			<location unit="FT">
				<x>22.8346456692913</x>
				<z>14.4356955380577</z>
			</location>
			<capacity unit="LBS">10</capacity>
			<contents unit="LBS">1</contents>
			<drain_location unit="FT">
				<x>22.8346456692913</x>
				<z>13.1233595800525</z>
			</drain_location>
			<priority>1</priority>
		</tank>

		<tank type="FUEL" number="2">
			<location unit="FT">
				<x>32.6771653543307</x>
				<z>14.4356955380577</z>
			</location>
			<capacity unit="LBS">10</capacity>
			<contents unit="LBS">1</contents>
			<drain_location unit="FT">
				<x>32.6771653543307</x>
				<z>13.1233595800525</z>
			</drain_location>
			<priority>2</priority>
		</tank>

		<!-- Fuel Tanks -->

		<tank type="FUEL" number="3">
			<location unit="FT">
				<x>22.8346456692913</x>
				<z>14.4356955380577</z>
			</location>
			<capacity unit="LBS">2945</capacity>
			<contents unit="LBS">1</contents>
			<drain_location unit="FT">
				<x>22.8346456692913</x>
				<z>13.1233595800525</z>
			</drain_location>
			<priority>1</priority>
		</tank>

		<tank type="FUEL" number="4">
			<location unit="FT">
				<x>32.6771653543307</x>
				<z>14.4356955380577</z>
			</location>
			<capacity unit="LBS">2945</capacity>
			<contents unit="LBS">1</contents>
			<drain_location unit="FT">
				<x>32.6771653543307</x>
				<z>13.1233595800525</z>
			</drain_location>
			<priority>2</priority>
		</tank>

		<!-- Aux Fuel Tank -->

		<tank type="FUEL" number="5">
			<location unit="FT">
				<x>37.9593175853018</x>
				<z>14.4356955380577</z>
			</location>
			<capacity unit="LBS">2925</capacity>
			<contents unit="LBS">1</contents>
			<drain_location unit="FT">
				<x>37.5</x>
				<z>13.1233595800525</z>
			</drain_location>
			<priority>2</priority>
		</tank>

	</propulsion>

	<flight_control>

		<property type="double" value="0">OWS/testing</property>
		<property type="double" value="0">propulsion/engine[1]/rotor/thrust-lbs</property>
		<property type="double" value="0">forces/fbx-lbs</property>
		<property type="double" value="0">forces/fby-lbs</property>
		<property type="double" value="0">forces/fbz-lbs</property>
		<property type="double" value="0">moments/l-lbsft</property>
		<property type="double" value="0">moments/m-lbsft</property>
		<property type="double" value="0">moments/n-lbsft</property>

	</flight_control>

<!--  	<system file = "TurboProp_Test"/> -->

<!-- 	<system file = "testing/Standard_Day"/> -->

<!--  	<system file = "electrical system"/>
 	<system file = "fuel system"/>
 	<system file = "hydraulic system"/>
 	<system file = "engine management system"/>

	<system file = "flight_control"/>

 	<system file = "propulsion"/>
   	<system file = "angle_of_attack"/>
	<system file = "co-efficients"/>
	<system file = "force_calcs"/> -->

	<!--
	<system file = "load_master"/>
	<system file = "T4T/test"/>
	-->

	<aerodynamics>

<!-- 		<axis name="ROLL">

			<function>
				<ifthen>
					<gt>
						<property>OWS/testing</property>
						<value>0</value>
					</gt>
					<value>0</value>
					<property>moments/l-lbsft</property>
				</ifthen>
			</function>

		</axis>

		<axis name="PITCH">

			<function>
				<ifthen>
					<gt>
						<property>OWS/testing</property>
						<value>0</value>
					</gt>
					<value>0</value>
					<property>moments/m-lbsft</property>
				</ifthen>
			</function>

		</axis> -->

	</aerodynamics>

	<!-- STRUCTURAL frame (x +ve aft, y +ve right, z +ve up) -->
	<external_reactions>

<!-- 		<force name="fuselage" frame="BODY">
			<function>
				<ifthen>
					<gt>
						<property>OWS/testing</property>
						<value>0</value>
					</gt>
					<value>0</value>
					<value>1</value>
				</ifthen>
			</function>
			<location>
			</location>
			<direction>
			</direction>
		</force>

		<force name="h-tail" frame="BODY">
			<function>
				<ifthen>
					<gt>
						<property>OWS/testing</property>
						<value>0</value>
					</gt>
					<value>0</value>
					<value>1</value>
				</ifthen>
			</function>
			<location unit="FT">
				<x>68.89764</x>
				<y>3.28084</y>
				<z>21.71916</z>
			</location>
			<direction>
			</direction>
		</force>

		<force name="rotor_main" frame="BODY">
			<function>
				<ifthen>
					<gt>
						<property>OWS/testing</property>
						<value>0</value>
					</gt>
					<value>0</value>
					<value>1</value>
				</ifthen>
			</function>
			<location unit="IN">
				<z>256</z>
			</location>
			<direction>
			</direction>
		</force>

		<force name="rotor_tail" frame="BODY">
			<function>
				<ifthen>
					<gt>
						<property>OWS/testing</property>
						<value>0</value>
					</gt>
					<value>0</value>
					<value>1</value>
				</ifthen>
			</function>
			<location unit="IN">
				<x>869.29</x>
				<y>-31.88</y>
				<z>256</z>
			</location>
			<direction>
			</direction>
		</force>

		<force name="ground_effect" frame="LOCAL">
			<function>
				<ifthen>
					<gt>
						<property>OWS/testing</property>
						<value>0</value>
					</gt>
					<value>0</value>
					<value>1</value>
				</ifthen>
			</function>
			<location unit="IN">
				<z>256</z>
			</location>
			<direction>
			</direction>
		</force> -->

	</external_reactions>

<!--	<output name="Test_Output.csv" type="CSV" rate="10">
		<position> ON </position>
	</output> -->

</fdm_config>
